*HEADING
WP05 C3D6 affine patch deck validation
*NODE
1,0.,0.,0.
2,1.,0.,0.
3,0.,1.,0.
4,0.,0.,1.
5,1.,0.,1.
6,0.,1.,1.
*NSET,NSET=ALLN
1,2,3,4,5,6
*NSET,NSET=FIXED
1,2,3
*ELEMENT,TYPE=C3D6,ELSET=EALL
1,1,2,3,4,5,6
*SOLID SECTION,ELSET=EALL,MATERIAL=MAT
*MATERIAL,NAME=MAT
*ELASTIC
210000.,0.3
*STEP
*STATIC
*BOUNDARY
FIXED,1,3
*CLOAD
4,3,1.
*NODE PRINT,NSET=ALLN
U
*EL PRINT,ELSET=EALL
S
*END STEP
