*HEADING
QF_solver HEX8 same-mesh CalculiX C3D8 correlation
*NODE
1,0,0,0
2,2.5,0,0
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*ELEMENT,TYPE=C3D8,ELSET=EALL
1,1,2,11,10,28,29,38,37
2,2,3,12,11,29,30,39,38
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*SOLID SECTION,ELSET=EALL,MATERIAL=MAT
*MATERIAL,NAME=MAT
*ELASTIC
210000000000,0.3
*BOUNDARY
1,1,1,0.
1,2,2,0.
1,3,3,0.
10,1,1,0.
10,2,2,0.
10,3,3,0.
19,1,1,0.
19,2,2,0.
19,3,3,0.
28,1,1,0.
28,2,2,0.
28,3,3,0.
37,1,1,0.
37,2,2,0.
37,3,3,0.
46,1,1,0.
46,2,2,0.
46,3,3,0.
55,1,1,0.
55,2,2,0.
55,3,3,0.
64,1,1,0.
64,2,2,0.
64,3,3,0.
73,1,1,0.
73,2,2,0.
73,3,3,0.
*STEP
*STATIC
0.1,1.0,1.E-8,0.1
*CLOAD
9,3,-111111.111111
18,3,-111111.111111
27,3,-111111.111111
36,3,-111111.111111
45,3,-111111.111111
54,3,-111111.111111
63,3,-111111.111111
72,3,-111111.111111
81,3,-111111.111111
*NODE FILE,FREQUENCY=1
U
*END STEP
